S_p1 := 5.039 + 1i*1.52
S_p2 := 4.029 + 1i*1.13
z_дж1.1 := 1.76 - 1i*3.61
z_1.2 := 1.58 - 1i*3.25
z_дж2.2 := 1.84 - 1i*3.78
S_1 := (S_p1*(z_1.2 + z_дж2.2) + S_p2*z_дж2.2)/(z_дж1.1 + z_1.2 + z_дж2.2) = 4.7605 + 1.40454i
S_2 := (S_p1*z_дж1.1 + S_p2*(z_дж1.1 + z_1.2))/(z_дж1.1 + z_1.2 + z_дж2.2) = 4.3075 + 1.24546i
S_1 + S_2 = 9.068 + 2.65i
S_p1 + S_p2 = 9.068 + 2.65i
